*Heading
** Job name: mindlinDirect_PontualSin Model name: Model-1
** Generated by: Abaqus/CAE Learning Edition 2025
*Preprint, echo=NO, model=NO, history=NO, contact=NO
**
** PARTS
**
*Part, name=Part-1
*Node
      1,           0.,           0.,           0.
      2,  0.100000001,           0.,           0.
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*Element, type=S4R
  1,   1,   2,  13,  12
  2,   2,   3,  14,  13
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*Nset, nset=_PickedSet2, internal, generate
   1,  121,    1
*Elset, elset=_PickedSet2, internal, generate
   1,  100,    1
** Section: Section-1
*Shell Section, elset=_PickedSet2, material=Material-1
0.1, 5
*End Part
**
**
** ASSEMBLY
**
*Assembly, name=Assembly
**
*Instance, name=Part-1-1, part=Part-1
*End Instance
**
*Nset, nset=Set-1, instance=Part-1-1
 61,
*Nset, nset=Set-2, instance=Part-1-1, generate
   1,  121,    1
*Elset, elset=Set-2, instance=Part-1-1, generate
   1,  100,    1
*Nset, nset=Set-3, instance=Part-1-1
   1,   2,   3,   4,   5,   6
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*Elset, elset=Set-3, instance=Part-1-1
   1,   2,   3,   4,   5,   6
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*End Assembly
*Amplitude, name=Amp-1
             0.,              0.,           0.025,           0.309,            0.05,           0.588,           0.075,           0.809
            0.1,           0.951,           0.125,              1.,            0.15,           0.951,           0.175,           0.809
            0.2,           0.588,           0.225,           0.309,            0.25,              0.,           0.275,          -0.309
            0.3,          -0.588,           0.325,          -0.809,            0.35,          -0.951,           0.375,             -1.
            0.4,          -0.951,           0.425,          -0.809,            0.45,          -0.588,           0.475,          -0.309
**
** MATERIALS
**
*Material, name=Material-1
*Damping, alpha=0.1, beta=0.01
*Density
1.,
*Elastic
10920., 0.3
** ----------------------------------------------------------------
**
** STEP: Step-1
**
*Step, name=Step-1, nlgeom=NO
*Dynamic
2.,2.,2e-05
**
** BOUNDARY CONDITIONS
**
** Name: BC-1 Type: Displacement/Rotation
*Boundary
Set-2, 1, 1
Set-2, 2, 2
Set-2, 6, 6
** Name: BC-2 Type: Displacement/Rotation
*Boundary
Set-3, 3, 3
Set-3, 4, 4
Set-3, 5, 5
**
** LOADS
**
** Name: Load-1   Type: Concentrated force
*Cload
Set-1, 3, -1.
**
** OUTPUT REQUESTS
**
*Restart, write, frequency=0
**
** FIELD OUTPUT: F-Output-1
**
*Output, field, variable=PRESELECT
**
** HISTORY OUTPUT: H-Output-1
**
*Output, history, variable=PRESELECT
*End Step
